# ---------Initialize Simulation---------
clear
units 		metal
dimension 	3
boundary 	p p p   #p indicates that the boundary (x,y,z) is periodic  s is shrink-wrapped
atom_style 	atomic
atom_modify 	map array
variable	seed equal 250123
variable	vel_seed equal floor(random(0,100000,v_seed))
variable	anneal_seed equal floor(random(0,100000,v_seed))

# ---------Create Atoms-------------------
# Si is a diamond lattice
# lattice constant: 5.5 AA

lattice diamond 5.43
region 		BOX block 0 3 0 3 0.0 4.0 units lattice
region		CrystalLattice block 0 3 0 3 0 0.95 units lattice
create_box 	1 BOX

lattice diamond 5.43 orient x 1 0 0 orient y 0 1 0 orient z 0  0 1
mass 		1 28.0855
create_atoms 	1 random 288 ${vel_seed} BOX

# ----------Define interatomic potential --------------
pair_style 	quip
pair_coeff 	* * gp_iter6_sparse9k.xml "Potential xml_label=GAP_2017_6_17_60_4_3_56_165" 14

# -----------Modify Neighbors as specifed in example GAP script --------------
neighbor	0.3 bin
neigh_modify	delay 10

# ----------Perform initial potential energy minimization with a conjugate gradient method -----------
min_style	hftn
minimize	1.0e-2 1.0e-3 100 1000

# ----------Dump xyz file with atoms -----------
dump 		1 all atom 10000 test.xyz

# ------- Initialize conditions ----------
#set initial temperature to be 2000K
velocity 	all create 300.0 ${vel_seed} mom yes rot yes dist gaussian  # mom and rot yes means net linear and angular momentum is zero
timestep 	.0001 #.1 fs

# ------- Display conditions each 1000 step
thermo_style 	custom step temp pe press lx ly lz
thermo 		1000

# --------Run simulation -------------
#Anneal the system at 2400K
fix		heat all nvt temp 300.0 2400.0 0.1
run		500000 #anneal for 50 ps
unfix		heat

#Cool the sample back down to 100K
fix		quench all nvt temp 2400.0 200.0 0.1
run 		22000000 # was 23000000 to go to 300K #was 11500000 then 16500000
unfix		quench

#min_style	hftn
#minimize	1.0e-2 1.0e-3 100 1000

#Perform global relaxation in the NPT ensemble
fix		relax all npt temp 200.0 50.0 0.1 z 0.0 0.0 1.0 drag 0.2
run 		1500000 #was 1400000 for 1000-9 sample #23000000 #was 1000000
unfix		relax

fix		1 all langevin 50.0 0.0 0.1 16450
fix		2 all nve
run		500000
unfix		1
unfix		2

#minimize	1.0e-2 1.0e-3 100 1000

# --------- Dump xyz file with atoms of only the final state ------------
write_dump	all atom testSnapshot.xyz
