# ---------Initialize Simulation---------
clear
units 		metal
dimension 	3
boundary 	p p s   #p indicates that the boundary (x,y,z) is periodic  s is shrink-wrapped
atom_style 	atomic
atom_modify 	map array

# ---------Create Atoms-------------------
# Si is a diamond lattice
# lattice constant: 5.5 AA

lattice diamond 5.43
region 		FULLBOX block 0 10 0 10 0 12 units lattice
region 		FIXEDHALF block 0 5 0 5 0 3 units lattice
region 		MOBILEHALF block 0 5 0 5 3 6 units lattice
region 		ATOMICBOX union 2 FIXEDHALF MOBILEHALF
create_box 	1 ATOMICBOX

lattice diamond 5.43 orient x 1 0 0 orient y 0 1 0 orient z 0  0 1
mass 		1 28.0855
create_atoms 	1 region ATOMICBOX
group 		fixedatoms region FIXEDHALF
group 		mobileatoms region MOBILEHALF

# ----------Define interatomic potential --------------
pair_style 	tersoff
pair_coeff 	* * potentials/Si.tersoff Si
#neighbor 	4.0 bin
#neigh_modify 	delay 10 check yes

# ---------Create bonds --------------  NEED TO FIGURE OUT HOW TO DO THIS
#create_bonds 	many all all 1 1.0 1.2

# ----------Dump xyz file with atoms and bonds -----------
# Read with Ovito or jmol
dump 		1 all atom 1000 cSi.xyz
#dump_modify 	1 element Si

# ------- Initialize conditions ----------
#set initial temperature to be 100K
velocity 	mobileatoms create 300.0 15046 mom yes rot yes dist gaussian  # mom and rot yes means net linear and angular momentum is zero
timestep 	.0001 #.1fs

# ------- Display conditions each 1000 step
thermo_style 	custom step temp pe ke etotal lz
thermo 		100

# --------Run simulation -------------
#Stabilize the simulation at 300K
fix		1 mobileatoms nvt temp 300.0 300.0 0.1
run		100000 #10 ps
unfix 		1

#Heat the sample to 2000K
fix 		2 mobileatoms nvt temp 300.0 2000.0 1.0
run 		150000
unfix 		2

#Anneal the sample at 2000K
fix 		3 mobileatoms nvt temp 2000.0 2000.0 0.1
run 		150000 #15 ps
unfix 		3

#Cool the sample back down to 300K
fix		4 mobileatoms nvt temp 2000.0 300.0 0.1
run 		2833000 #for a cooling rate of 6*10^12 K/s (6K/ps)
unfix		4

#Anneal the sample at 300K
fix		5 mobileatoms nvt temp 300.0 300.0 0.1
run		100000 #10 ps
unfix		5


# --------- Run Energy Minimization -------------
#minimize 	1.0e-4 1.0e-6 1000 100000
#Alternative is to use fix viscous to drain the kinetic energy out of the system
